// SBML level 2 version 4

model LotkaVolterra()

  // Compartments:
  compartment cell = 1;

  // Species:
  species Prey in cell = 30/cell;  // substance in item
  species Predator in cell = 5/cell;  // substance in item

  // Parameters:
  alpha = 5 per_second;
  beta = 0.1 per_item_second;
  gamma = 0.7 per_second;
  time_delay = 2 per_second;

  // Reactions:
  PreyGrowth: Prey => 2 Prey; alpha*Prey^1;
  Predation: Prey + 2 Predator => 3 Predator; beta*Prey^1*Predator^2;
  PredatorDeath: 1.5 Predator => ; gamma*Predator^1.5;

  // Events:
  AddPray: at (time_delay) after ((time >= 1) && (time < 2)): Prey = Prey + 20;

  // Unit definitions:
  unit per_second = 1 / second;
  unit per_item_second = 1 / (item * second);
end
